// COMSOL Multiphysics 6.4.0.293 model "Dia60Al40_ElectrothermalMVP.mph"
// Outline of the model tree

Parameters
  W = 400.0[um]
  H = 208.69853399999997[um]
  Vapp = 0.0154982447030624[V]
  Tamb = 293.15[K]
  rho_eff = 2700[kg/m^3]
  Cp_eff = 900[J/(kg*K)]

Functions
  props: Interpolation "插值"
    importedname = stage5_comsol_interpolation.txt
    funcnametable = {{sigma_map, 1}, {k_map, 2}}
    source = file
    filename = C:\Users\15972\.comsol\v64\applications\files\user\dia60al40_loading_sensitivity\stage5_comsol_interpolation.txt
    filecolumns = 4
    columnKeys = {col1, col2, col3, col4}
    columnType = {col1, arg, col2, arg, col3, value, col4, value}
    funcnames = {col1, props, col2, props, col3, sigma_map, col4, k_map}
    fununit = {S/m, W/(m*K)}
    argunit = {um, um}
    plotfuncname = sigma_map
    nargs = 2
    funcs = {{sigma_map, 1}, {k_map, 2}}

Selections
  sel_bottom: Box "框"
    entitydim = 1
    xmin = -0.1[um]
    xmax = 400.1[um]
    ymin = -0.1[um]
    ymax = 0.1[um]
    condition = inside
  sel_top: Box "框 2"
    entitydim = 1
    xmin = -0.1[um]
    xmax = 400.1[um]
    ymin = 208.598534[um]
    ymax = 208.798534[um]
    condition = inside
  sel_electrodes: Union "并集" | entitydim = 1; input = {sel_bottom, sel_top}

Geometry
  geom1 "几何 1" (2D, length unit µm)
    r1: Rectangle "矩形 1" | size = {W, H}
    fin: Finalize "形成联合体"

Materials
  mat1: Common "材料 1" on all domains
    def: def "基本"
      electricconductivity = sigma_map(x,y)
      thermalconductivity = k_map(x,y)
      density = rho_eff
      heatcapacity = Cp_eff

Physics
  ec: ConductiveMedia "电流" on all domains
    dependent variable V
    cucns1: CurrentConservationSolid "固体中的电流守恒 1" (default)
    ein1: ElectricInsulation "电绝缘 1" (default)
    init1: init "初始值 1" (default)
    pot1: ElectricPotential "电势 1" on selection sel_top | V0 = Vapp
    gnd1: Ground "接地 1" on selection sel_bottom
  ht: HeatTransfer "固体传热" on all domains
    dependent variable T
    solid1: SolidHeatTransferModel "固体 1" (default)
    init1: init "初始值 1" (default)
    ins1: ThermalInsulation "热绝缘 1" (default)
    temp1: TemperatureBoundary "温度 1" on selection sel_electrodes | T0 = Tamb

Multiphysics
  emh1: ElectromagneticHeatSource "电磁热源 1" on all domains | EMHeat_physics = ec; Heat_physics = ht

Mesh
  mesh1 "网格 1"
    size: MeshSizeDefault "大小" | hmax = 8.0[um]; hmin = 1.0[um]
    ftri1: FreeTri "自由三角形网格 1" on remaining entities

Studies
  std1 "研究 1"
    stat: Stationary "稳态"

Solver configurations
  sol1 "解 1" (study std1)
    v1: Variables "因变量 1"
    s1: Stationary "稳态求解器 1"
      fc1: FullyCoupled "全耦合 1"
      d1: Direct "Direct (已合并)"

Datasets
  dset1: Solution | solution = sol1

Derived values
  maxT: MaxSurface "表面最大值" on all domains | data = dset1; expr = T
  intQ: IntSurface "面积分" on all domains | data = dset1; expr = ec.Qh

Plots
  pgV: PlotGroup2D "二维绘图组" | data = dset1
    surf1: Surface "表面 1" | expr = V
  pgT: PlotGroup2D "二维绘图组 2" | data = dset1
    surf1: Surface "表面 1" | expr = T
  pgQ: PlotGroup2D "二维绘图组 3" | data = dset1
    surf1: Surface "表面 1" | expr = ec.Qh

Exports
  imgV: Image "图像"
    source = /Results/ResultFeatureList/pgV
    width = 1000
    height = 650
    pngfilename = C:\Users\15972\.comsol\v64\applications\files\user\dia60al40_loading_sensitivity\result\comsol_potential.png
  imgT: Image "图像 2"
    source = /Results/ResultFeatureList/pgT
    width = 1000
    height = 650
    pngfilename = C:\Users\15972\.comsol\v64\applications\files\user\dia60al40_loading_sensitivity\result\comsol_temperature.png
  imgQ: Image "图像 3"
    source = /Results/ResultFeatureList/pgQ
    width = 1000
    height = 650
    pngfilename = C:\Users\15972\.comsol\v64\applications\files\user\dia60al40_loading_sensitivity\result\comsol_joule_heat.png
  data1: Data "数据 1"
    data = dset1
    expr = {V, T, ec.normJ, ec.Qh, sigma_map(x,y), k_map(x,y)}
    filename = C:\Users\15972\.comsol\v64\applications\files\user\dia60al40_loading_sensitivity\result\comsol_fields.csv