# Dia60/Al40 quasi-2D staged DEM compaction for COMSOL handoff
# Units: cgs (cm, g, s). Geometry meshes generated by ../python/prepare_meshes.py
#
# Purpose:
#   DEM handles particle rearrangement and contact-network closure.
#   COMSOL should consume selected stage dumps for local stress/plasticity.
#
# Stage definition:
#   rho_total = (Al area + diamond area) / (W * current_top_height)
#   W = 400 um, top starts at 220 um in this DEM die.
#
# Stages written by this deck:
#   stage0_preload  : Route-B preload, top moved 18.220 um, rho_total ~0.566
#   stage1_rho065  : top moved to target rho_total ~0.65
#   stage2_rho072  : top moved to target rho_total ~0.72
#   stage3_rho080  : top moved to target rho_total ~0.80
#   stage4_rho088  : top moved to target rho_total ~0.88
#   stage5_rho095  : top moved to target rho_total ~0.95

atom_style      granular
atom_modify     map array
boundary        f f f
newton          off
communicate     single vel yes
units           cgs

variable        Tcm equal 0.0090
variable        Wcm equal 0.04
variable        Hcm equal 0.022
variable        topVel equal 1.0
variable        dt equal 2.0e-10

region          simreg block -0.002 0.042 -0.004 0.024 -0.0045 0.0045 units box
create_box      4 simreg
neighbor        0.00012 bin
neigh_modify    delay 0

timestep        ${dt}

# type 1 = Al, type 2 = Diamond, type 3 = top tool, type 4 = die/wall.
# DEM moduli for the pressure-density curve:
#   Diamond=300 GPa, top tool=600 GPa, die/wall=200 GPa.
#   Al follows a staged smoothstep approximation:
#     E_Al(rho) = E0 + (Emax-E0)*(3*x^2-2*x^3)
#     x = clamp((rho-rho0)/(rho95-rho0),0,1), E0=5 GPa, Emax=12 GPa.
#   Default rendered stage values: 5, 5.84666, 7.4619, 9.62196, 11.3846, 12 GPa.
# In CGS, 1 GPa = 1e10 dyne/cm^2. The timestep is reduced because these
# contact moduli are much stiffer than the earlier soft-calibration deck.
# LIGGGHTS-PUBLIC blocks Young's modulus above 1e10 in CGS unless this explicit
# override is set.
hard_particles  yes
fix             mprop all property/global youngsModulus peratomtype 5.0e10 3.0e12 6.0e12 2.0e12
fix             pprop all property/global poissonsRatio peratomtype 0.33 0.10 0.31 0.30
fix             cor all property/global coefficientRestitution peratomtypepair 4 &
                0.20 0.15 0.15 0.15 &
                0.15 0.10 0.10 0.10 &
                0.15 0.10 0.10 0.10 &
                0.15 0.10 0.10 0.10
fix             cof all property/global coefficientFriction peratomtypepair 4 &
                0.30 0.30 0.08 0.08 &
                0.30 0.10 0.08 0.08 &
                0.08 0.08 0.08 0.08 &
                0.08 0.08 0.08 0.08

pair_style      gran model hertz tangential history
pair_coeff      * *

# Particle-particle contact evidence for force-chain and stress post-processing.
# Column order is fixed by compute pair/gran/local: id(3), force(3),
# force_normal(3), delta(1), contactPoint(3).
compute         pairContacts all pair/gran/local id force force_normal delta contactPoint

# Fast settling gravity. DEM-only; downstream COMSOL does not inherit gravity.
fix             grav all gravity 98000 vector 0.0 -1.0 0.0
fix             integr all nve/sphere

fix             left all mesh/surface/stress file meshes/DieLeft.stl type 4 scale 1.0 stress on
fix             right all mesh/surface/stress file meshes/DieRight.stl type 4 scale 1.0 stress on
fix             bottom all mesh/surface/stress file meshes/DieBottom.stl type 4 scale 1.0 stress on
fix             frontback all mesh/surface file meshes/DieFrontBack.stl type 4 scale 1.0
fix             top all mesh/surface/stress file meshes/TopPlate.stl type 3 scale 1.0 stress on
fix             walls all wall/gran model hertz tangential history mesh n_meshes 5 meshes left right bottom frontback top

# Macro pressure output. fix mesh/surface/stress stores the total force on the
# top mesh in dyne; pressure_MPa uses the 2D model thickness Tcm as the out-of-
# plane width, so pressure = |F_top_y| / (Wcm*Tcm).
variable        topForceYDyn equal f_top[2]
variable        topForceAbsDyn equal abs(f_top[2])
variable        bottomForceYDyn equal f_bottom[2]
variable        bottomForceAbsDyn equal abs(f_bottom[2])
variable        leftForceXDyn equal f_left[1]
variable        leftForceAbsDyn equal abs(f_left[1])
variable        rightForceXDyn equal f_right[1]
variable        rightForceAbsDyn equal abs(f_right[1])
variable        topAreaCm2 equal v_Wcm*v_Tcm
variable        topPressureMPa equal v_topForceAbsDyn/v_topAreaCm2*1.0e-7
variable        bottomPressureMPa equal v_bottomForceAbsDyn/v_topAreaCm2*1.0e-7

# Quasi-2D lock. Keep this after wall/gran so wall forces cannot inject z motion.
fix             zlock all setforce NULL NULL 0.0

# Templates: radii in cm. 13 um=0.0013 cm, 18 um=0.0018 cm, 30 um=0.0030 cm.
# The previous 4 x 42 um large-diamond layout created persistent structural
# voids. Use 8 medium diamonds with nearly the same total diamond area, but a
# better chance to rearrange and fill the lower/middle die space.
fix             ptsAl all particletemplate/sphere 15485863 atom_type 1 density constant 2.70 radius constant 0.0013
fix             ptsDS all particletemplate/sphere 15485867 atom_type 2 density constant 3.52 radius constant 0.0018
fix             ptsDL all particletemplate/sphere 49979693 atom_type 2 density constant 3.52 radius constant 0.0030
fix             pddAl all particledistribution/discrete/numberbased 32452843 1 ptsAl 1.0
fix             pddDS all particledistribution/discrete/numberbased 32452867 1 ptsDS 1.0
fix             pddDL all particledistribution/discrete/numberbased 67867967 1 ptsDL 1.0

# Sequential insertion targets are cumulative: 8 medium-DL, 16 total after DS,
# 50 total after Al. In LIGGGHTS insert/pack this number is the total target
# particle count after that insertion command, not the per-command increment.
region          particles_in_region block 0.0013 0.0387 0.0013 0.0207 -0.000001 0.000001 units box
fix             insDL all insert/pack seed 49979687 distributiontemplate pddDL maxattempt 20000 insert_every once overlapcheck yes all_in no particles_in_region 8 region particles_in_region ntry_mc 20000
run             1
set             group all z 0.0
velocity        all set NULL NULL 0.0
unfix           insDL
fix             insDS all insert/pack seed 67867979 distributiontemplate pddDS maxattempt 20000 insert_every once overlapcheck yes all_in no particles_in_region 16 region particles_in_region ntry_mc 20000
run             1
set             group all z 0.0
velocity        all set NULL NULL 0.0
unfix           insDS
fix             insAl all insert/pack seed 86028121 distributiontemplate pddAl maxattempt 20000 insert_every once overlapcheck yes all_in no particles_in_region 50 region particles_in_region ntry_mc 20000
run             1
set             group all z 0.0
velocity        all set NULL NULL 0.0
unfix           insAl

thermo_style    custom step atoms ke vol f_top[2] f_bottom[2] f_left[1] f_right[1] v_topPressureMPa
thermo          10000
dump            dmp all custom 50000 DEM/staged_trace_*.dump id type x y z vx vy vz radius

print           "stage_id,target_rho_total,current_height_um,top_displacement_um,al_modulus_gpa,top_force_y_dyne,top_force_abs_dyne,pressure_mpa,bottom_force_y_dyne,bottom_pressure_mpa,left_force_x_dyne,right_force_x_dyne" file DEM/pressure_density_curve_raw.csv screen no
print           "parameter,value,unit" file DEM/model_parameters.csv screen no
print           "E_Al_stage0_preload,5,GPa" append DEM/model_parameters.csv screen no
print           "E_Al_stage1_rho065,5.84666,GPa" append DEM/model_parameters.csv screen no
print           "E_Al_stage2_rho072,7.4619,GPa" append DEM/model_parameters.csv screen no
print           "E_Al_stage3_rho080,9.62196,GPa" append DEM/model_parameters.csv screen no
print           "E_Al_stage4_rho088,11.3846,GPa" append DEM/model_parameters.csv screen no
print           "E_Al_stage5_rho095,12,GPa" append DEM/model_parameters.csv screen no
print           "E_Diamond,300,GPa" append DEM/model_parameters.csv screen no
print           "E_Tool,600,GPa" append DEM/model_parameters.csv screen no
print           "E_Wall,200,GPa" append DEM/model_parameters.csv screen no
print           "mu_Al_Al,0.30,1" append DEM/model_parameters.csv screen no
print           "mu_Al_Diamond,0.30,1" append DEM/model_parameters.csv screen no
print           "mu_Al_Tool,0.08,1" append DEM/model_parameters.csv screen no
print           "mu_Al_Wall,0.08,1" append DEM/model_parameters.csv screen no
print           "mu_Diamond_Diamond,0.10,1" append DEM/model_parameters.csv screen no
print           "mu_Diamond_Tool,0.08,1" append DEM/model_parameters.csv screen no
print           "mu_Diamond_Wall,0.08,1" append DEM/model_parameters.csv screen no
print           "smoothstep_E_Al,E0_5_to_Emax_12_by_stage,description" append DEM/model_parameters.csv screen no

# Initial settling before any punch motion.
run             1250000

# Stage 0: preload reference, 18.220 um total top travel.
fix             topMove all move/mesh mesh top linear 0.0 -${topVel} 0.0
run             9110026
unfix           topMove
run             1250000
print           "stage0_preload,0.5668,201.779948,18.220052,5,${topForceYDyn},${topForceAbsDyn},${topPressureMPa},${bottomForceYDyn},${bottomPressureMPa},${leftForceXDyn},${rightForceXDyn}" append DEM/pressure_density_curve_raw.csv screen no
dump            st0 all custom 1 DEM/stage0_preload_*.dump id type x y z vx vy vz radius
dump            cst0 all local 1 DEM/stage0_preload_contacts_*.local &
                c_pairContacts[1] c_pairContacts[2] c_pairContacts[3] &
                c_pairContacts[4] c_pairContacts[5] c_pairContacts[6] &
                c_pairContacts[7] c_pairContacts[8] c_pairContacts[9] &
                c_pairContacts[10] c_pairContacts[11] c_pairContacts[12] c_pairContacts[13]
run             0
undump          st0
undump          cst0
write_restart   DEM/stage0_preload.restart

# Stage 1: rho_total ~0.65. Additional travel to 44.047885 um.
unfix           mprop
fix             mprop all property/global youngsModulus peratomtype 5.84666e10 3.0e12 6.0e12 2.0e12
fix             topMove all move/mesh mesh top linear 0.0 -${topVel} 0.0
run             12913917
unfix           topMove
run             1250000
print           "stage1_rho065,0.6500,175.952115,44.047885,5.84666,${topForceYDyn},${topForceAbsDyn},${topPressureMPa},${bottomForceYDyn},${bottomPressureMPa},${leftForceXDyn},${rightForceXDyn}" append DEM/pressure_density_curve_raw.csv screen no
dump            st1 all custom 1 DEM/stage1_rho065_*.dump id type x y z vx vy vz radius
dump            cst1 all local 1 DEM/stage1_rho065_contacts_*.local &
                c_pairContacts[1] c_pairContacts[2] c_pairContacts[3] &
                c_pairContacts[4] c_pairContacts[5] c_pairContacts[6] &
                c_pairContacts[7] c_pairContacts[8] c_pairContacts[9] &
                c_pairContacts[10] c_pairContacts[11] c_pairContacts[12] c_pairContacts[13]
run             0
undump          st1
undump          cst1
write_restart   DEM/stage1_rho065.restart

# Stage 2: rho_total ~0.72. Additional travel to 61.154341 um.
unfix           mprop
fix             mprop all property/global youngsModulus peratomtype 7.4619e10 3.0e12 6.0e12 2.0e12
fix             topMove all move/mesh mesh top linear 0.0 -${topVel} 0.0
run             8553228
unfix           topMove
run             1250000
print           "stage2_rho072,0.7200,158.845659,61.154341,7.4619,${topForceYDyn},${topForceAbsDyn},${topPressureMPa},${bottomForceYDyn},${bottomPressureMPa},${leftForceXDyn},${rightForceXDyn}" append DEM/pressure_density_curve_raw.csv screen no
dump            st2 all custom 1 DEM/stage2_rho072_*.dump id type x y z vx vy vz radius
dump            cst2 all local 1 DEM/stage2_rho072_contacts_*.local &
                c_pairContacts[1] c_pairContacts[2] c_pairContacts[3] &
                c_pairContacts[4] c_pairContacts[5] c_pairContacts[6] &
                c_pairContacts[7] c_pairContacts[8] c_pairContacts[9] &
                c_pairContacts[10] c_pairContacts[11] c_pairContacts[12] c_pairContacts[13]
run             0
undump          st2
undump          cst2
write_restart   DEM/stage2_rho072.restart

# Stage 3: rho_total ~0.80. Additional travel to 77.038907 um.
unfix           mprop
fix             mprop all property/global youngsModulus peratomtype 9.62196e10 3.0e12 6.0e12 2.0e12
fix             topMove all move/mesh mesh top linear 0.0 -${topVel} 0.0
run             7942283
unfix           topMove
run             1250000
print           "stage3_rho080,0.8000,142.961093,77.038907,9.62196,${topForceYDyn},${topForceAbsDyn},${topPressureMPa},${bottomForceYDyn},${bottomPressureMPa},${leftForceXDyn},${rightForceXDyn}" append DEM/pressure_density_curve_raw.csv screen no
dump            st3 all custom 1 DEM/stage3_rho080_*.dump id type x y z vx vy vz radius
dump            cst3 all local 1 DEM/stage3_rho080_contacts_*.local &
                c_pairContacts[1] c_pairContacts[2] c_pairContacts[3] &
                c_pairContacts[4] c_pairContacts[5] c_pairContacts[6] &
                c_pairContacts[7] c_pairContacts[8] c_pairContacts[9] &
                c_pairContacts[10] c_pairContacts[11] c_pairContacts[12] c_pairContacts[13]
run             0
undump          st3
undump          cst3
write_restart   DEM/stage3_rho080.restart

# Stage 4: rho_total ~0.88. Additional travel to 90.035370 um.
unfix           mprop
fix             mprop all property/global youngsModulus peratomtype 1.13846e11 3.0e12 6.0e12 2.0e12
fix             topMove all move/mesh mesh top linear 0.0 -${topVel} 0.0
run             6498232
unfix           topMove
run             1250000
print           "stage4_rho088,0.8800,129.964630,90.035370,11.3846,${topForceYDyn},${topForceAbsDyn},${topPressureMPa},${bottomForceYDyn},${bottomPressureMPa},${leftForceXDyn},${rightForceXDyn}" append DEM/pressure_density_curve_raw.csv screen no
dump            st4 all custom 1 DEM/stage4_rho088_*.dump id type x y z vx vy vz radius
dump            cst4 all local 1 DEM/stage4_rho088_contacts_*.local &
                c_pairContacts[1] c_pairContacts[2] c_pairContacts[3] &
                c_pairContacts[4] c_pairContacts[5] c_pairContacts[6] &
                c_pairContacts[7] c_pairContacts[8] c_pairContacts[9] &
                c_pairContacts[10] c_pairContacts[11] c_pairContacts[12] c_pairContacts[13]
run             0
undump          st4
undump          cst4
write_restart   DEM/stage4_rho088.restart

# Stage 5: rho_total ~0.95. Additional travel to 99.611711 um.
unfix           mprop
fix             mprop all property/global youngsModulus peratomtype 1.2e11 3.0e12 6.0e12 2.0e12
fix             topMove all move/mesh mesh top linear 0.0 -${topVel} 0.0
run             4788171
unfix           topMove
run             2500000
print           "stage5_rho095,0.9500,120.388289,99.611711,12,${topForceYDyn},${topForceAbsDyn},${topPressureMPa},${bottomForceYDyn},${bottomPressureMPa},${leftForceXDyn},${rightForceXDyn}" append DEM/pressure_density_curve_raw.csv screen no
dump            st5 all custom 1 DEM/stage5_rho095_*.dump id type x y z vx vy vz radius
dump            cst5 all local 1 DEM/stage5_rho095_contacts_*.local &
                c_pairContacts[1] c_pairContacts[2] c_pairContacts[3] &
                c_pairContacts[4] c_pairContacts[5] c_pairContacts[6] &
                c_pairContacts[7] c_pairContacts[8] c_pairContacts[9] &
                c_pairContacts[10] c_pairContacts[11] c_pairContacts[12] c_pairContacts[13]
run             0
undump          st5
undump          cst5
write_restart   DEM/stage5_rho095.restart

undump          dmp
